# 6.1.2.3 Shear Forces and Bending Moments due to Live Loads
# a) Influence Lines for Shear Forces and Bending Moments
# a-1) Design Truck: HL-93 increment
# Influence Lines for Shear Force at "x" distance from end support
P_tru := 145 kN
L' := 16.6 m
# Influence Line for reaction at support
V'(x, x') := P_tru*(1.0 + (L' - x)/L' + (L' - x')/(4*L'))
V'(4.3 m, 8.6 m) = 269.91 kN
# Influence Lines for Shear Force at distance x from end support
V'_tr(x) := P_tru*((L' - x)/L' + (L' - x - 4.3 m)/L' + (L' - x - 8.6 m)/(4*L'))
# some how find a way to extract numbers b/n 1... L` ...
# then with those arrays try to construct a funciotn
# such that.......of two arrays for both variables....
# and find teh maximum for such...
# Influence Lines for Bending Moment at "x" distance from end support
# influence line for moment at distance x
# Loading_1
M_tr(x) := P_tru*(x*(L' - x)/L' + x*(L' - x - 4.3 m)/L' + x*(L' - x - 4.3 m)/(4*L'))
# Loading_2
M'_tr(x) := P_tru*((x - 4.3 m)*(L' - x)/(4*L') + x*(L' - x)/L' + x*(L' - x - 4.3 m)/L')
# a-2) Design Tandem
P_tan := 145 kN
# Influence Lines for Shear Force at 'x' distance from end support
# influence line for reaction at support
V_a(0) := P_tan*(1 + (L' - 1.2 m)/L')  # error: A name is required here.
# influence line for shear at distance 'x'
V'_ta(x) := P_tan*((L' - x)/L' + (L' - x - 1.2 m)/L')
# Influence Lines for Bending Moments at 'X' distance from end support
M_ta(x) := P_tan*(x*(L' - x)/L' + x*(L' - x - 1.20 m)/L')
# b) Shear forces due to Live load plus impact
# b-1) Exterior Girder
IM := 33 %
# Design Truck:
V_Ltr(x) := (1 + IM)*V'_tr(x)
# Design Tandem:
V_Lta(x) := (1 + IM)*V'_ta(x)
# c) Bending Moments due to Live load plus impact
# c-1) Exterior Girder
# Design Truck:
M_Ltr(x) := (1 + IM)*max(M_tr(x), M'_tr(x))
# table here
# Design Tandem:
M_Lta(x) := (1 + IM)*M_ta(x)
# table here
