# ____________________________Design Data and Specifications________________________________________________________
# 1.1 Material Properties
# Steel Strength,---- ----------------------------------------------------------
f_y := 400 MPa
# Concrete strength,----------------------------------------------------------
f'_c := 28 MPa
# Concrete density, f_y --------------------------------------------------------
γ_c := 2400*kg/m^3
# Bitumiinous Density --------------------------------------------------------
γ_b := 2250*kg/m^3
# Water Density -------------------------------------------------------------
γ_wtr := 1000*kg/m^3
# Water Unit weight --------------------------------------------------------
γ_w := 9.81*kN/m^3
# The modulus of elasticity of steel--------------------------------------
E_s := 200 GPa
# 1.2 Bridge Span and Support Dimensions
# Clear span of the bridge -----------------------------------------------------------------
C_s := 11 m
# Road way /clear carriage width --------------------------------------------------------
R_w := 7.32 m
# Additional curb width including bottom width of the
# concrete barrier/ posts  ---------------------------
C_w := 0.8 m
# Curb depth---------------------------------------------------------------------------------------
C_d := 0.25 m
# Bearing shelf width, f_y ----------------------------------------------------------------------
W_rs := 0.5 m
# Concrete posts and railings are used
# Railing depth --------------------------------------------------------
R_d := 0.3 m
# Railing width --------------------------------------------------------
R_ww := 0.15 m
# Post depth, f_y --------------------------------------------------------
P_d := 0.3 m
# Post width, f_y --------------------------------------------------------
P_w := 0.3 m
# Post height, f_y --------------------------------------------------------
P_h := 0.85 m
# Post spacing, f_y ------------------------------------------------------
P_s := 1.2 m
# Thickness of Asphalt Layer, f_y ----------------------------------------------
t_asL := 100 mm
# Concrete cover for the slab, f_y ---------------------------------------------
C_covr := 35 mm
# 1.3 Reinforcement Sizes
# Diameter of main reinforcement ----------------------------------------------------------
ϕ_main := 32 mm
# Diameter of distribution reinforcement --------------------------------------------------
ϕ_dis := 16 mm
# Diameter of temperature reinforcement -------------------------------------------------
ϕ_temp := 12 mm
# ** Design Method: LRFD
# * Specifications:
# AASHTO LRFD Bridge Design Specifications, 4th ed. 2007
# Ethiopian Roads Authority, ERA Bridge Design Manual, 2013
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# ____________________________Design of RC Slab Bridge_____________________________________________________________
# ____________________________Depth / Width Determination __________________________________________________________
# 2.1  Depth Determination
# According to AASHTO (Table 2.5.2.6.3-1),minimum recommended depth for slabs with main reinforcement parallel
# to the traffic is:
S' := C_s + W_rs = 11.5 m  # ..............................(c/c spacing of the bridge)
D := 1.2*(S' + 3000 mm)/30 = 580 mm
use
D = 580 mm
# 2.2  Equivalent Strip widths, AASHTO Article 4.6.2.3
# 2.2.1) Interior Strip
# 2.2.2.1)  One lane loaded
# multiple presence factor included
W' := R_w + 2*C_w = 8.92 m  # -------  # the edge-to-edge width of the bridge
E' := min(18000 mm, 250 mm + 0.42*(S'*W')^0.5) = 4503.83 mm
# 2.2.2.1)  Multiple lanes loaded
# Number of lanes loaded
NL := floor(R_w/(3.6 m)) = 2
E'' := 2100 mm + 0.12*sqrt(S'*W') = 3315.38 mm
E_use := if(E'' < W'/NL, E'', E') = 3315.38 mm
# Shear and moment per meter width of strip is critical for multiple lanes
# loaded because (4503.835 mm >3315.381 mm)
# Equivalent Concentrated and distributed loads
Truck_P'_1 := 35 kN/E'' = 10.5569 kN/m
Truck_P'_2 := 145 kN/E'' = 43.7355 kN/m
Tandem_P'_3 := 110 kN/E'' = 33.1787 kN/m
Lane_W' := 9.3 kN/E'' = 2.80511 kN/m
# 2.2.2) Edge Strip
# Longitudinal edge strip width for a line of wheels
E_long := min(C_w + 300 mm + 1/2*E_use, 1800 mm) = 1800 mm
# 2.3 Influence Lines for shear force and bending moment
# * Slab bridges shall be designed for all vehicular live loads specified in AASHTO Art. 3.6.1.2 including the lane load.
# Live Load Force Effects
# 2.3.1)  Interior Strip
# 2.3.1.1) Influence Line for Moment (Truck Load)
# 2.3.1.2) Influence Line for Moment (Tandem Load)
# 2.3.1.3) Influence Line for Moment (Truck Load)
# 2.3.1.4) Influence Line for Shear Force (Tandem Load)
# 2.3.2)  Edge strip
# Half of the lane width is taken for design (multiple presence factor of 1.2 will be critical) since edge
# strip width is limitted to 1800mm for one-lane loaded.
V_LLtIM := □
M_LLtIM := □
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# ____________________________Load_Force_Effects ________________________________________________________________
# 2.4 Dead Load Force Effects
# 2.4.1)  Interior Strip
# Take 1m strip, unit wt. of concrete ---------------------
γ_c = 2400 kg/m^3
d' := D - ϕ_main/2 - C_covr = 529 mm
W_dc := γ_c*γ_w/γ_wtr*D = 13.6555 kN/m^2  # ------------------------------------- (dead load of the deck slab)
W_dw := γ_c*γ_w/γ_b*t_asL = 1.0464 kN/m^2  # ------------------------------------ (dead load of the wearing surface)
# 2.4.2)  Edge strip
# Dead Load Computations
# Assume curb, railings & post loadings spread over edge strip width (1800mm)
curb := (0.25*0.75 + 0.5*0.25*0.05)*(2400*9.81)/1000/1.8 + 13.656 = 16.1902
Railing := 0.15*0.3*(2400*9.81)/1000/1.8 = 0.5886
No_post := floor(clearspan/post_spacing + 1)  # --------------------- Number of posts
post := (0.3*0.3*0.85)*10*(2400*9.81)/1000/(1.8*11.5) = 0.870104
# Thus, the total edge load becomes
Tot_edge := curb + Railing + No_post
# 2.5  Select Resistance Factors
# Strength Limit States (RC)
# Flexure & Torsion
# Resistance Factor -----------
R_f := 1
# 2.6 Select Load Modifiers
# i) Strength Limit State
# i) Ductility  -----------------------------------
d_u := 0.95  # -----[Art. 1.3.3]
# ii) Redundancy  --------------------------------
r_du := 1.05  # -----[Art. 1.3.4]
# iii) Importancy ----------------------------------
I_mp := 1.05  # -----[Art. 1.3.5]
# Load Modifier -----------------------------------
L_mod := max(d_u, r_du, I_mp) = 1.05
# ____________________________Load_combo / Investigate Strength _____________________________________________________
# 2.7 Select Applicable Load Combinations (AASHTO, Table 3.4.1-1)
# i) Strength Limit State
U := L_mod*(1.25*DC + 1.50*DW + 1.75*(LL + IM) + 1.00*(FR + TG))  # error: This '(' requires a matching ')'.
# 2.7.1.) Investigate Strength Limit State
# Design Shear and Moment Computaions
# For simple slab bridges, temperature gradient effect reduces gravity load effects.
# Because temperature gradient may not be there, assume TG=0
# Thus
U := 1.05*(1.25*DC + 1.50*DW + 1.75*(LL + IM))
# a) Interior Strip
# i) Shear Force
table
# ii) Moment
table
# b) Edge Strip
# i) Shear Force
table
# ii) Moment
table
# ____________________________Check_adequecy ___________________________________________________________________
# Checking the adequacy of the section
# The section is checked for the maximum design moment whether the initial depth under consideration is sufficed or not.
d_ic := sqrt(M_max/(0.254*b*f'_c))
chk_adequ := if(d_ic < d', "the section is sufficed", "section is not sufficed")
# Check for shear
V_cc := 0.14*sqrt(f'_c) + 17.2*ρ*V_u/M_u
V'_cc := if(V_cc < (0.29*sqrt(f'_c)), 0.29*sqrt(f'_c), V_cc)
d_iv := V_du/V_cc  # The section is sufficed!
# i) Flexural Reinforcement
# Interior Strip
# (Using 32 mm diameter reinforcing bars)
A_si := □  # >>>>>>>>>>>>>>>  # Use Φ 16 c/c 250 mm  # (As provided= 5024 mm2 )
# Edge Strip
A_se := □  # >>>>>>>>>>>>>>>  # Use Φ 16 c/c 250 mm  # (As provided= 5024 mm2 )
# ii) Shear Reinforcement, AASHTO Article 5.14.4.1
# Slab bridges designed for moment in conformance with Article 4.6.2.3 may be considered satisfactory for shear.
# iii) Distribution Reinforcement, AASHTO Article 5.14.4.1
# The amount of bottom transverse reinforcement may be taken as a percentage of the main reinforcement required
# for positive moment and a minimum spacing of 250mm.
P_e := min(50, 1750/sqrt(L_1))  # ----- Percentage of distribution reinforcement
# a.) Interior Strip
# (Using 16 mm diameter reinforcing bars)
A_ti := P_e*A_sti
S_di := min(a_si*1000/A_ti, 250)
A_s := □
S := □  # Use Φ 16 c/c 250 mm
# b.) Edge Strip
# (Using 16 mm diameter reinforcing bars)
A_ti := P_e*A_sti
S_di := min(a_si*1000/A_ti, 250)
A_s := □
S := □  # Use Φ 16 c/c 250 mm
# iv) Shrinkage and Temperature Reinforcement, AASHTO section 5.10.8
# Reinforcement for shrinkage and temperature reinforcement shall be provided near surfaces of concrete exposed to daily
# temperature changes. The steel should be distributed equally on both sides.
A_st > 0.75*A_g/f_y
# A._g is the gross concrete area
A_st := 0.75*A_g/f_y  # (in each direction, both faces)
# Top layer
A_stT := 1/2*A_st
# Spacing
sp_c := min(a_si*1000/A_st, 250)  # (in each direction, both faces)
# Use Φ12 mm rebars c/c 200mm, transverse
# 2.7.2. . Investigation of Service Limit State
# Actions to be considered at the service limit state shall be cracking, deformations, and concrete stresses, as specified in
# Articles 5.7.3.4, 5.7.3.6, and 5.9.4 respectively
# 2.7.2.1) Durability
# For durability, adequate cover shall be used (for bottom of cast in place slab the cover is 35mm).
# A 35mm concrete cover is provided here, thus there is no problem of durability.
# 2.7.2.2) Adequacy of Reinforcement Bars
# a) Moment Interior Strip
# The load factors used above in all dead and live loads are taken as unity.
MDU := □  # Assume; j =0.875 and fs=0.6fy
A_s := M_p/(f_s*j*d_p)  # (provide diam. 32 c/c 160mm)
# b) Moment Edge Strip
MDU := □  # Assume; j =0.875 and fs=0.6fy
A_s := M_p/(f_s*j*d_p)  # OK!
# 2.7.2.3) Control of Cracking
# The cracking stress shall be taken as the modulus of rupture specified in AASHTO, Article 5.4.2.6.
# Cracking may occur in the tension zone for RC members due to the low tensile strength of concrete. The cracks may
# be controlled by distributing steel reinforcements over the maximum tension zone in order limit the maximum allowable
# crack widths at the surface of the concrete for given types of environment.
# The tensile stress in the mild steel reinforcement (f_s) at the service limit state doesn’t exceed f_sa
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Z := 23000*N/mm  # ----------------  crack width parameter
f_sa := Z/(d_c*A)^(1/3)
# where:-
d_c := Con_cov + (dia_bar/2)
# -------------------- measured from the extreme tension fiber
# clear cover to compute
# A._c  -------------
# area of concrete having the same centroid as the principal tensile reinforcement are bounded by the surfaces of the cross section and a line parallel the neutral axis divided by the number of bars (mm^2), clear cover here also ≤50mm.
# S  --------------- | spacing of bars.
# f_r  ---------------- | modulus of rupture
# f_cten  ------------- | tensile strength of the concrete
f_cten := 6*M_us/(b*D^2)
A_c := 2*d_c*S
# If (f _cten> 0.8 f_r) the section has cracked (AASHTO, Article 5.7.3.4 and 5.4.2.6)
MDu := □
f_r := 0.63*sqrt(f'_c)
chk_sec_crack := if(f_cten > 0.8*f_r, "Section_has_cracked", "Section is Safe")
# Steel stress for elastic cracked section for which moment of inertia of the composite transformed section,
# I_cr, should be used.
# a) Interior Strip
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# Moment about the NA:
b*x_2^2/2 := n*A_pi(d_i - x_2)  # error: A name is required here.
I_cr := b*x_2^3/3 + n*A_pi(d_i - x_2)^2
# where:
# x_2  is the neutral axis depth from top fiber
f_s := M_du*(d_i - x_2)*n/I_cr
# M_Du= unfactored max moment, interior strip.
# I_cr = moment of inertia of the composite transformed section
f_sa := Z/(2*(D - d_i)^2*S_i)^(1/3)
# The equivalent concrete area ----------------
nA_pi := □
A_pi := □
S_i := □
d_i := □
n := E_s/E_c
M_du := □
# subistitution yields:-
x_2 := □
I_cr := □
f_s := □
f_sa := □
# The above results show that :
chk_sec_crack := if(f_s < f_sa, "Section is Safe", "Section_has_cracked")
# Provide 32 mm rebars spaced at 160 mm
# b) Edge Strip
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# Moment about the NA:
c_w*x_3^2/2 := n*A_pe(d_e - x_2)  # error: A name is required here.
I_cre := real(c_w - 0.05)*x_3^3/3 + n*A_pe(d_e - x_3)^2
f_s := M_due*(d_e - x_3)*n/I_cre
# The equivalent concrete area ----------------
nA_pe := □
f_sa := Z/(2*(D - d_e)^2*S_e)^(1/3)
A_pe := □
S_e := □
d_e := □
n := E_s/E_c
M_due := □
# subistitution yields:-
x_3 := □
I_cre := □
f_s := □
f_sa := □
# The above results show that :
chk_sec_crack := if(f_s < f_sa, "Section is Safe", "Section_has_cracked")
# Provide 32 mm rebars spaced at 160 mm
# ____________________________Check for Deformations ______________________________________________________________
# 2.7.2.4)  Deformations
# Deflection and Camber, AASHTO Article 5.7.3.6.2
# Deflection and camber calculations shall consider dead load, live load, erection loads, concrete creep and shrinkage.
# Immediate (Instantaneous) deflections may be computed taking the moment of inertia as either the effective moment of
# inertia I_e, or the gross moment of inertia I_g.
# Unless a more exact deformation calculation is made, the long-term deflection due to creep and shrinkage may be taken as
# the immediate deflection multiplied by the following factor (AASHTO, Article 5.7.3.6.2).
# 4, if the instantaneous deflection is based on I_g
3.0 - 1.2*(A'_s/A_s) > 1.6  # if the instantaneous deflection is based on I_e
# a) Dead load camber
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# Total dead load of the bridge and the whole bridge cross section is considered.
C_w := □
D := □
R_w := □
C_d := □
# Dead Loads of the whole bridge
table
# The total, maximum and critical moments due to dead and live load of the whole slab bridge, respectively are given by the equations:
M_lld := M_md + max(M_trl, M_tml)*E_ml*NL  # E_m1 (interior strip width) is in m and NL is the number of design lanes.
M_md := W_dd*L_l^2/8
y_t := (((R_w + 2*C_w - 0.3)*D^2/2) + (2*C_w*C_d((C_d/2) + D)))/((R_w + 2*C_w - 0.3)*D + (C_w*2*C_d))  # error: This value has units: Unitless, but must have units: Length.
# Thus, the gross moment of inertia of the whole slab bridge becomes
I_g := 8.62*0.58^3/12 + (8.62*0.58*(0.58/2 - 0.321)^2) + 2*0.8*0.25^3/12 + (2*0.8*0.25*(0.705 - 0.321)^2)
I_g := □
I_cr := I_cr_inter*(W - 2*E_e) + 2*I_cr_edge
I_cr := □
# Where: | W ------------- the total width of the bridge
# E_e ------------ the width of the edge strip
# The effective moment of inertia is calculated using the following equation
I_e := (M_cr/M_a)^3*I_g + (1 - (M_cr/M_a)^3)*I_cr ≤ I_g
# where:
# M_lld= total moment due to dead and live load of the whole slab bridge
# M_md= total dead load moment of the whole slab bridge
# M_cr= critical moment of the whole slab bridge
M_cr := f_r*I_g/y_r
I_e := □
if(M_cr < M_md, "The section cracks under DL, use Ie", "use I.g") =  # error: This variable is undefined.
E_c := 0.043*γ_c^1.5*sqrt(f'_c)
# γ.c: ------ unit density of concrete (kg/m^3) refer to Table 3.5.1-1 or Article C5.4.2.4
# f_c: ------ Specified compressive strength of concrete (MPa)
# Thus, the dead load deflection of the slab bridge is given by:
d_dl := 5*W_dl*L_l^4/(384*E_c*I_c)
3*d_dl
# ------------------------------------- Long term deflection
camber := d_dl + 3*d_dl
# b)  Live Load Deflection (AASHTO, Article 2.5.2.6.2)
# For vehicular load in general,
d_max := L_1/800
# where:
# L1: span length of the bridge in mm
# dmax : the permissible limit ( max. deflection)
# In the computation of live load deflection, design truck load alone or design lane load plus 25% of truck load is considered (AASHTO, Article 3.6.1.3.2)
# i) Deflection due to truck load
P_LL1 == P_LL2 := 1.33*145*NL  # error: A name is required here.
P_LL3 := 1.33*35*NL
# where:
# P_LL1 and P_LL2 are truck loads
# eqn or formula
# At xl =6.6125m | M_tr=169.462 kN-m/m | (Location of maximum truck load effect)
# The maximum deflection of the bridge due to truck load occurs at a wheel load position where moment is a maximum.Thus,
# the deflection at the point of maximum moment, x, due to each truck load at 'a' distance a from the left support is given by:
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d_ki := P_LLi*b*x*((L_l^2 - b^2 - x^2)/(6*E_c*I_c*L_l))  # for
x ≤ a
x ≥ a
d_ki := P_LLi*a(L_l - x)*(2*L_1*x - a^2 - x^2)/(6*E_c*I_c*L_1)  # for
# where:
# dki =  deflection due to each truck load.
# location of the load to be considered, b=L1-a and x=L1-X
# (EI)conc =26752*0.07E+12 = 1.84E+15 (Nmm^2)
# a) First Load, P_LL1
a := □
b := □
x := □
d_tr1 := □
# b) Second Load, P_LL2
a := □
b := □
x := □
d_tr1 := □
# c) Third Load, P_LL3
a := □
b := □
x := □
d_tr1 := □
# Using the method of superposition, the total live load deflection due truck load is the sum of each deflections, dki’s.
# Thus, compare the value obtained with the permissible limit.
d_tr := d_tr1 + d_tr2 + d_tr3
# ii) Deflection due to tandem load
# The maximum deflection due to tandem load occurrs when a single concentrated tandem load is
# acting at the mid span.
d_t1 := P_st1*L_1^3/(48*E_c*I_c)  # (where P_stl is a concentrated load at the mid span)
# where
# dtl = deflection due to tandem load
# P_stl = Single concentrated factored tandem load
1.33*110*2*NL = 585.2  # kN
d_t1 := □
# iii) Deflection due to lane load
WL_l == 9.3*NL
d_La := 5*WL_l*L_l^4/(384*E*I_e)
d_ll := max(d_tr, d_la + 0.25*d_tr)
10.15 mm
d_max := max(d_ll, d_tl)
# Where:
# d_la | ----------------------- | deflection due to lane load
# WL_l | ----------------------- | lane load
# d_ll | ----------------------- | total live load deflection
d_max := □
chk_deflection := if(d_max < 14.375 mm, "deflection is with in limit", "deflection need to be checked")
chk_deflection := □
# 2.7.3. Investigation of Fatigue Limit State (AASHTO, Section 5.5.3)
# Magnitude and Configuration of Fatigue Load
# The fatigue load shall be one design truck or axles thereof specified in Article 3.6.1.2.2, but with a constant spacing of 9000mm
# between the 145 000-N axles. The dynamic load allowance specified in Article 3.6.2 shall be applied to the fatigue load.
U := 0.75*(LL + IM)
# FS for LL is 0.75
# where:
# U = Fatigue load shall be one design truck with 9m spacing.
# Maximum moment results when the two front axles are on the span and the rear axle is out of the span.
M_mf := 0.75*1.15*M_max
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# M_max occurs at x= 6.0375m and equals to 444.719 kNm
M_mf := 0.75*1.15*M_max
# M_mf --------------------------- | the maximum moment for fatigue.
# a) Tensile live load stresses
# One lane loaded, Strip width is Em1 (for interior strip)
M_llf := M_mf/E_ml  # (E_m1 is in meter)
# where:
# M._llf  ------------- | is the maximum moment per meter width for fatigue.
f_s_max := n*M_llf*(D - x_2)/I_cr
chk_tensile := if(f_s_max < 240*Mpa, "Okay!!", "Not_Okay!!")
chk_tensile := □
# b) Reinforcing Bars
# The stresses range in straight reinforcement bars resulting from fatigue load combination shall not exceed (AASHTO, Section 5.5.3.2)
# If fsmax < ff , then there is no problem of fatigue. Otherwise increase the area of reinforcing bars
# where:
# f_f | ------------------------  is the stress range
f_min
# ------------------------
# is the minimum live load stress resulting from fatigue load, combined with the more severe stress from
# permanent loads. For simplly supported slab bridge f min is zero.
f_f := 166 - 0.33*f_min
chk_fatigue := if(f_f > 40.599 MPa, "okay!!", "Not_Okay")
chk_fatigue := □
# ____________________________Abutment design  __________________________________________________________________
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# Dimensions and Material Properties
# Calculations
# Bottom width of the foundation on the left side----------------
BL_1 := □
# Bottom width of the toe on the right side------------------------
BL_3 := □
# slope -------------------------------------------------------------------------
V_H := □
# Top width of the abutment cap-------------------------------------
x := □
# Depth of the abutment cap------------------------------------------
B_f1 := □
# Depth of the base concrete------------------------------------------
h_t := □
# Depth of the base concrete---------------------------------------------
h_h := □
# Top height of the abutment---------------------------------------------
H := □
# The modulus of elasticity of steel--------------------------------------
q_all := □
# Allowable stress of the foundation Soil,-----------------------------
δ := □
# Friction angle of the backfill material--------------------------------
γ_bm := □
# Density of the backfill material,---------------------------------------
C := □
# Cohesion of the backfill material-------------------------------------
γ_m := □
# Unit weight of the abutment-------------------------------------------
γ_ac := □
# Unit weight of the abutment cap-------------------------------------
γ_ac := □
# Soil thickness (surcharge)---------------------------------------------
t_s := □
# Percentage of creep, shrinkage & temperature------------------
# 10 % of DL
# Passive Pressure is considered.
# Height--------------------------------------------------------------------------
H_2 := □
# 3.3.2__CALCULATIONS
# 1) DIMENSIONS
# Net height of the abutment,
H_net := (H - t_s)
H_l := 3.67 m
B_l := H_l/slope  # error: This value must be a scalar.
B_L2 := B_l + W_rs + x
B_2 := W_rs + x
B := BL_1 + BL_2 + BL_3
# 2) LOADS
# i) Dead Load Reaction
R_dl := (W_dc + W_dw)*L_1/2
# ii) Live Load Reactions
R_lli := 2*E_e*(max(V_tre, V_tmel) + V_ln) + (R_wt - 2*E_e/1000)*(max(V_tr, V_tml) + V_ln)
# iii) Wind Load on Live Loads
WL := 1.46*(H_l + 1.8)  # error: This value has units: Unitless, but must have units: Length.  # ---------1.8m above roadway surface.
# iv) Breaking Force, Brf
B_rf := 0.25*(2*P2 + P1)*NL  # ----------,Braking force,25%, 1.8m above roadway surface.
# v) Creep, shrinkage & temperature...(10% of DL)
CR_SH_TU := □
# vi) Lateral active earth pressure
q_ult := 1.5*q_all
ϕ := 1.5*δ  # error: This value must be a scalar.
θ := 180 deg - tan(H1/B1)^-1
η := (1 + sqrt(sin(δ + θ))*sin(ϕ))/(sin(δ + θ)*sin(θ))^2
γ := 180 deg - (δ + θ)
P_max := k_a*γ_bm*H_net - 2*C*sqrt(K_a)
P_a := 0.5*P_max*H_net
P_ah := P_a*sin(γ)
P_av := P_a*cos(γ)
# vii) Lateral passive earth pressure
K_p := 1/K_a
P_maxp := k_p*γ_bm*H_net + 2*C*sqrt(K_p)
P_p := 0.5*P_maxp*H_2
P_p := 0.5*P_maxp*H_2
P_ph := P_p*sin(γ)
P_pv := P_p*cos(γ)
# viii) Dead load Surcharge
q_ss := γ_bm*t_s
Pressure_DL := k_a*q_ss
Q_sh := k_a*q_ss*sin(γ)
Q_sh := k_a*q_ss*cos(γ)
# xi)  Live load Surcharge
Pressure_LL := k_a*h_eq*γ_bm
Q_lh := Pressure_LL*sin(γ)
Q_lh := Pressure_LL*cos(γ)
# 3) LOAD COMBINATIONS
# Strength I:
DC := 1.25
LL := 1.75
ES := 1.5
CR_SH_TU := 0.5
EV := 1.35
BR := 1.75
WL := 0
EH := 1.5
LS := 1.75
WS := 0
# Strength Ia:
DC' := 0.9
LL' := 1.75
ES' := 0.75
CR_SH_TU' := 0.5
EV' := 1
BR' := 1.75
WL' := 0
EH' := 0.9
LS' := 1.75
WS' := 0
# Total Width of the abutment = 8.92m
table
# Stability and Safety Criteria
# 1 Eccentricity
table
# 2 Sliding
table
# 3 Bearing Capacity
table
# ____________________________Design of Curbs  _________________________________________________________________
# 3.3.3 Design of Curbs
# According to AASHTO Bridge Design Manual (Art. 2.7), curbs will be designed to resist a lateral force of 7.3
# kN/m applied at the top of the curb or the railing load of 44.5kN whichever produces larger force effect.
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M_1 := 7.3*C_d = 1.825 m
E := 0.833*P_h + 1.143  # error: This value has units: Unitless, but must have units: Length.
M_2 := 44.5*x/E
# M_2 will be taken for design
M_u := 1.3*max(M_1, M_2)
# Design Moment, M_u
M_u := □
b := 1000 mm
d := C_w - 0.15 - cover - ϕ/2
ρ := 0.00025
ρ_min := 0.0021  # (Using 16 mm diameter reinforcing bars)
A_s := ρ_min*b*d
# Use Φ 16 c/c 150 mm
# Temperature Reinforcement
A_st := 0.75*A_g/f_y
A_st := 0.75*C_w(D + C_d)/400  # error: This value must be a function, but has the form: Length.
spacing := min(a_st*1000/A_st, 250)
# Use Φ12 mm rebars c/c 180mm
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